# OpenSim document version 40000
Model:
  Ground: meshes=treadmill.vtp
  BodySet:
    Body pelvis: mass=11.777 [kg] mass_center=(-0.0707 0 0) inertia=(0.1028 0.0871 0.0579 0 0 0)
        meshes=(pelvis.vtp sacrum.vtp l_pelvis.vtp)
    Body femur_r: mass=9.3014 mass_center=(0 -0.17 0) inertia=(0.1339 0.0351 0.1412 0 0 0) meshes=femur_r.vtp
    Body tibia_r: mass=3.7075 mass_center=(0 -0.1867 0) inertia=(0.0504 0.0051 0.0511 0 0 0)
        meshes=(tibia_r.vtp fibula.vtp)
    Body talus_right: mass=0.1 mass_center=(0 -0.1867 0) inertia=(0.0504 0.0051 0.0511 0 0 0) meshes=talus.vtp
    Body calcn_right: mass=1.25 mass_center=(0.1 0.03 0) inertia=(0.0014 0.0039 0.0041 0 0 0) meshes=foot.vtp
    Body toes_r: mass=0.2166 mass_center=(0.0346 0.006 -0.0175) inertia=(0.0001 0.0002 0.0001 0 0 0) meshes=bofoot.vtp
    Body femur_left: mass=9.3014 mass_center=(0 -0.17 0) inertia=(0.1339 0.0351 0.14121 0 0 0) meshes=femur_l.vtp
    Body tibia_l: mass=0.0504 mass_center=(0 -0.1867 0) inertia=(0.0504 0.0051 0.0511 0 0 0)
        meshes=(tibia_l.vtp l_fibula.vtp)
    Body talus_l: mass=0.1 mass_center=(0 0 0) inertia=(0.001 0.001 0.001 0 0 0) meshes=l_talus.vtp
    Body calcn_l: mass=1.25 mass_center=(0.1 0.03 0) inertia=(0.0014 0.0039 0.0041 0 0 0) meshes=l_foot.vtp
    Body toes_l: mass=0.2166 mass_center=(0.0346 0.006 0.0175) inertia=(0.0001 0.0002 0.0001 0 0 0) meshes=l_bofoot.vtp
    Body torso: mass=34.2366 mass_center=(-0.03 0.32 0) inertia=(1.47445 0.7555 1.4317 0 0 0)
        meshes=(hat_spine.vtp hat_jaw.vtp hat_skull.vtp hat_ribs.vtp)
  JointSet:
    CustomJoint ground_pelvis: socket_parent_frame=ground_offset socket_child_frame=pelvis_offset
      Coordinate pelvis_tilt: default_value=0 range=(-1.570796 1.570796) clamped=false
      Coordinate pelvis_list: default_value=0 range=(-1.570796 1.570796) clamped=false
      Coordinate pelvis_rotation: default_value=0 range=(-1.570796 1.570796) clamped=false
      Coordinate pelvis_tx: default_value=0 range=(-5 5) clamped=false
      Coordinate pelvis_ty: default_value=0.95 range=(-1 2) clamped=false
      Coordinate pelvis_tz: default_value=0 range=(-3 3) clamped=false
      PhysicalOffsetFrame ground_offset: socket_parent=/ground translation=(0 0 0) [meters]
      PhysicalOffsetFrame pelvis_offset: socket_parent=/bodyset/pelvis translation=(0 0 0)
      SpatialTransform:
        TransformAxis rotation1: coordinates=pelvis_tilt axis=(0 0 1) LinearFunction(coefficients=1 0)
        TransformAxis rotation2: coordinates=pelvis_list axis=(1 0 0) LinearFunction(coefficients=1 0)
        TransformAxis rotation3: coordinates=pelvis_rotation axis=(0 1 0) LinearFunction(coefficients=1 0)
        TransformAxis translation1: coordinates=pelvis_tx axis=(1 0 0) LinearFunction(coefficients=1 0)
        TransformAxis translation2: coordinates=pelvis_ty axis=(0 1 0) LinearFunction(coefficients=1 0)
        TransformAxis translation3: coordinates=pelvis_tz axis=(0 0 1) LinearFunction(coefficients=1 0)
    CutomJoint hip_r: socket_parent_frame=pelvis_offset socket_child_frame=femur_r_offset
      Coordinate hip_flexion_r: default_value=0 range=(-2.094395 2.094395)
      Coordinate hip_adduction_r: default_value=0 range=(-2.094395 2.094395)
      Coordinate hip_r_coord_2
      PhysicalOffsetFrame pelvis_offset: socket_parent=/bodyset/pelvis translation=(-0.0707 -0.0661 0.0835)
      PhysicalOffsetFrame femur_r_offset: socket_parent=/bodyset/femur_r translation=(0 0 0)
    CutomJoint knee_r: socket_parent_frame=femur_r_offset socket_child_frame=tibia_r_offset
      Coordinate knee_angle_r: default_value=0 range=(-2.094395 0.1745329)
      Coordinate knee_r_coord_1
      Coordinate knee_r_coord_2
      PhysicalOffsetFrame femur_r_offset: socket_parent=/bodyset/femur_r translation=(0 -0.38 0)
      PhysicalOffsetFrame tibia_r_offset: socket_parent=/bodyset/tibia_r translation=(0 0 0)
    CutomJoint ankle_r: socket_parent_frame=tibia_r_offset socket_child_frame=talus_right_offset
      Coordinate ankle_angle_r: default_value=0 range=(-1.570796 1.570796)
      Coordinate ankle_r_coord_1
      Coordinate ankle_r_coord_2
      Coordinate ankle_r_coord_3
      Coordinate ankle_r_coord_4
      Coordinate ankle_r_coord_5
      PhysicalOffsetFrame tibia_r_offset: socket_parent=/bodyset/tibia_r translation=(0 -0.43 0)
      PhysicalOffsetFrame talus_right_offset: socket_parent=/bodyset/talus_right translation=(0 0 0)
    CutomJoint subtalar_r: socket_parent_frame=talus_right_offset socket_child_frame=calcn_right_offset
      Coordinate subtalar_angle_r: default_value=0 range=(-1.570796 1.570796)
      Coordinate subtalar_r_coord_1
      Coordinate subtalar_r_coord_2
      Coordinate subtalar_r_coord_3
      Coordinate subtalar_r_coord_4
      Coordinate subtalar_r_coord_5
      PhysicalOffsetFrame talus_right_offset: socket_parent=/bodyset/talus_right
          translation=(-0.04877 -0.04195 0.00792)
      PhysicalOffsetFrame calcn_right_offset: socket_parent=/bodyset/calcn_right translation=(0 0 0)
    CutomJoint mtp_r: socket_parent_frame=calcn_right_offset socket_child_frame=toes_r_offset
      Coordinate mtp_angle_r: default_value=0 range=(-1.570796 1.570796)
      Coordinate mtp_r_coord_1
      Coordinate mtp_r_coord_2
      PhysicalOffsetFrame calcn_right_offset: socket_parent=/bodyset/calcn_right translation=(0.1788 -0.002 0.00108)
      PhysicalOffsetFrame toes_r_offset: socket_parent=/bodyset/toes_r translation=(0 0 0)
    CutomJoint hip_l: socket_parent_frame=pelvis_offset socket_child_frame=femur_left_offset
      Coordinate hip_flexion_l: default_value=0 range=(-2.094395 2.094395)
      Coordinate hip_adduction_l: default_value=0 range=(-2.094395 2.094395)
      Coordinate hip_adduction_l_0: default_value=0 range=(-2.094395 2.094395)
      PhysicalOffsetFrame pelvis_offset: socket_parent=/bodyset/pelvis translation=(-0.0707 -0.0611 -0.0835)
      PhysicalOffsetFrame femur_left_offset: socket_parent=/bodyset/femur_left translation=(0 0 0)
    CutomJoint knee_r_0: socket_parent_frame=femur_left_offset socket_child_frame=tibia_l_offset
      Coordinate knee_angle_r: default_value=0 range=(-2.094395 0.1745329)
      Coordinate knee_r_coord_1
      Coordinate knee_r_coord_2
      PhysicalOffsetFrame femur_left_offset: socket_parent=/bodyset/femur_left translation=(0 -0.38 0)
      PhysicalOffsetFrame tibia_l_offset: socket_parent=/bodyset/tibia_l translation=(0 0 0)
    CutomJoint ankle_joint: socket_parent_frame=tibia_l_offset socket_child_frame=talus_l_offset
      Coordinate ankle_angle_l: default_value=0 range=(-1.570796 1.570796)
      Coordinate ankle_joint_coord_1
      Coordinate ankle_joint_coord_2
      PhysicalOffsetFrame tibia_l_offset: socket_parent=/bodyset/tibia_l translation=(0 -0.43 0)
      PhysicalOffsetFrame talus_l_offset: socket_parent=/bodyset/talus_l translation=(0 0 0)
    CutomJoint subtalar_l: socket_parent_frame=talus_l_offset socket_child_frame=calcn_l_offset
      Coordinate subtalar_angle_l: default_value=0 range=(-1.570796 1.570796)
      Coordinate subtalar_l_coord_1
      Coordinate subtalar_l_coord_2
      PhysicalOffsetFrame talus_l_offset: socket_parent=/bodyset/talus_l translation=(-0.04877 -0.04195 -0.00792)
      PhysicalOffsetFrame calcn_l_offset: socket_parent=/bodyset/calcn_l translation=(0 0 0)
    CutomJoint mtp_l: socket_parent_frame=calcn_l_offset socket_child_frame=toes_l_offset
      Coordinate mtp_angle_l: default_value=0 range=(-1.570796 1.570796)
      Coordinate mtp_l_coord_1
      Coordinate mtp_l_coord_2
      PhysicalOffsetFrame calcn_l_offset: socket_parent=/bodyset/calcn_l translation=(0.1788 -0.002 -0.00108)
      PhysicalOffsetFrame toes_l_offset: socket_parent=/bodyset/toes_l translation=(0 0 0)
    CutomJoint back: socket_parent_frame=pelvis_offset socket_child_frame=torso_offset
      Coordinate lumbar_extension: default_value=0 range=(-1.570796 1.570796)
      Coordinate lumbar_bending: default_value=0 range=(-1.570796 1.570796)
      Coordinate lumbar_rotation: default_value=0 range=(-1.570796 1.570796)
      PhysicalOffsetFrame pelvis_offset: socket_parent=/bodyset/pelvis translation=(-0.1007 0.0815 0)
      PhysicalOffsetFrame torso_offset: socket_parent=/bodyset/torso translation=(0 0 0)
